*Heading
** Job name: Beam_Analysis Model name: Beam
** Generated by: Abaqus/CAE 6.13-1
*Preprint, echo=NO, model=NO, history=NO, contact=NO
**
** PARTS
**
*Part, name=Beam
*Node
      1,         -10.,         -10.,         200.
      2,         -10.,          -5.,         200.
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*Element, type=C3D8R
  1,  206,  207,  212,  211,    1,    2,    7,    6
  2,  207,  208,  213,  212,    2,    3,    8,    7
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*Nset, nset=Set-1, generate
    1,  1025,     1
*Elset, elset=Set-1, generate
   1,  640,    1
** Section: Homogeneous
*Solid Section, elset=Set-1, material=Steel
,
*End Part
**
**
** ASSEMBLY
**
*Assembly, name=Assembly
**
*Instance, name=Beam-1, part=Beam
*End Instance
**
*Nset, nset=Set-1, instance=Beam-1
  201,  202,  203,  204,  205,  406
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*Elset, elset=Set-1, instance=Beam-1
 157, 158, 159, 160, 317, 318, 319, 320, 477, 478, 479, 480, 637, 638, 639, 640
*Elset, elset=_Surf-1_S4, internal, instance=Beam-1, generate
   4,  640,    4
*Surface, type=ELEMENT, name=Surf-1
_Surf-1_S4, S4
*End Assembly
**
** MATERIALS
**
*Material, name=Steel
*Elastic
210000., 0.3
** ----------------------------------------------------------------
**
** STEP: Static_Step
**
*Step, name=Static_Step, nlgeom=NO
*Static
0.1, 1., 1e-05, 1.
**
** BOUNDARY CONDITIONS
**
** Name: BC-1 Type: Symmetry/Antisymmetry/Encastre
*Boundary
Set-1, PINNED
**
** LOADS
**
** Name: Load-1   Type: Pressure
*Dsload
Surf-1, P, 100.
**
** OUTPUT REQUESTS
**
*Restart, write, frequency=0
**
** FIELD OUTPUT: F-Output-1
**
*Output, field, variable=PRESELECT
**
** HISTORY OUTPUT: H-Output-1
**
*Output, history, variable=PRESELECT
*End Step
